OpenVSP model (file version 4), 6 components.
Geometry view with OpenVSP parameter names; values to 6 digits, angles in degrees, lengths in the model's unit.
Overall bounding box: X_Min=0.000891137 X_Len=22.3922 Y_Min=-20.5769 Y_Len=41.1537 Z_Min=-1.45633 Z_Len=5.99687

Wing "Planeur"
  location (X Y Z) 0 0 0, rotation 0 0 0
  symmetric about XZ
  bounding box size 22.3922 41.1537 3.64965
  totals: TotalSpan=41.1537 TotalProjectedSpan=41.1537 TotalChord=10.7912 TotalArea=313.19
  root: chord 20, twist 0, airfoil file "MH 78_0_V2"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 ThickChord=0.1
  sections:
    n  Span     Root_Chord  Tip_Chord  Area     Sweep    Sweep_Location  Dihedral  Twist  Twist_Location  tip airfoil
    1  3.68     20          16.91      67.9144  35.4194  0               0         0      0.25            airfoil file "MH 78_1_V2"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 ThickChord=0.2
    2  2.5852   16.91       11.5       36.7227  60       0               0         0      0.25            NACA 4-series Camber=0 CamberLoc=0.2 ThickChord=0.2
    3  2.77165  11.5        4.3        21.8961  40       0.75            0         0      0.25            airfoil file "NASA SC(2)-0414"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 ThickChord=0.1
    4  11.54    4.3         0.91       30.0617  30       0               0         0      0.25            airfoil file "NASA SC(2)-0410"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 ThickChord=0.1

Custom "Nacelle1"
  location (X Y Z) 15.89 5 3.13, rotation 0 0 0
  bounding box size 4.4 2.78317 2.82108
  Design: Camber=0 CamberLoc=0.2 Chord=4.4 Height=2.255 InvertFlag=0 Shape=0 ThickChord=0.12 Width=2.255
  custom script Duct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

Custom "Nacelle2", child of "Nacelle1"
  location (X Y Z) 15.89 -5 3.13, rotation 0 0 0
  bounding box size 4.4 2.78317 2.82108
  Design: Camber=0 CamberLoc=0.2 Chord=4.4 Height=2.255 InvertFlag=0 Shape=0 ThickChord=0.12 Width=2.255
  custom script Duct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

Wing "Pylônes"
  location (X Y Z) 13.89 5 0, rotation 90 0 0
  symmetric about XZ
  bounding box size 4 10.4802 2
  totals: TotalSpan=4 TotalProjectedSpan=4 TotalChord=3 TotalArea=12
  root: chord 4, twist 0, NACA 4-series Camber=0 CamberLoc=0.2 ThickChord=0.12
  sections:
    n  Span  Root_Chord  Tip_Chord  Area  Sweep  Sweep_Location  Dihedral  Twist  Twist_Location  tip airfoil
    1  2     4           2          6     30     0               0         0      0.25            NACA 4-series Camber=0 CamberLoc=0.2 ThickChord=0.1

Fuselage "Moteur1"
  location (X Y Z) 14.27 5 3.19, rotation 0 0 0
  bounding box size 2.66886 1.86557 1.86557
  Design: Length=2.6
  cross sections:
    n  XLocPercent  YLocPercent  ZLocPercent  shape
    0  0            0.0434783    0            point
    1  0            0            0            circle Circle_Diameter=1.8
    2  1            0            0            as above
    3  1            0            0            point

Fuselage "Moteur2"
  location (X Y Z) 14.27 -5 3.19, rotation 0 0 0
  bounding box size 2.66886 1.86557 1.86557
  Design: Length=2.6
  cross sections:
    n  XLocPercent  YLocPercent  ZLocPercent  shape
    0  0            0.0434783    0            point
    1  0            0            0            circle Circle_Diameter=1.8
    2  1            0            0            as above
    3  1            0            0            point

VSPAERO settings: Sref=313.19 bref=41.1537 cref=10.7912 Xcg=0 Ycg=0 Zcg=0 AlphaStart=-3 AlphaEnd=10 AlphaNpts=27 BetaStart=0 BetaEnd=0 BetaNpts=1 MachStart=0.78 MachEnd=0 MachNpts=1
